*Heading
** Job name: SimJob Model name: Model-1
** Generated by: Abaqus/CAE 2024
*Preprint, echo=NO, model=NO, history=NO, contact=NO
**
** PARTS
**
*Part, name=Tube
*Node
      1,   246.697433,  -19.9154758,        1000.
      2,   244.294937,  -39.7017937,        1000.
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*Element, type=S4R
   1,   78,    1,   79,  156
   2,    1,    2,   80,   79
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*Nset, nset=_PickedSet2, internal, generate
    1,  3978,     1
*Elset, elset=_PickedSet2, internal, generate
    1,  3900,     1
** Section: ShellSection
*Shell Section, elset=_PickedSet2, material=Steel
5., 5
*End Part
**
**
** ASSEMBLY
**
*Assembly, name=Assembly
**
*Instance, name=Tube-1, part=Tube
*End Instance
**
*Nset, nset=_PickedSet3, internal, instance=Tube-1, generate
 3901,  3978,     1
*Elset, elset=_PickedSet3, internal, instance=Tube-1, generate
 3823,  3900,     1
*End Assembly
**
** MATERIALS
**
*Material, name=Steel
*Density
 7.8e-09,
*Elastic
210000., 0.3
**
** BOUNDARY CONDITIONS
**
** Name: Fixed Type: 对称/反对称/完全固定
*Boundary
_PickedSet3, ENCASTRE
** ----------------------------------------------------------------
**
** STEP: Step-1
**
*Step, name=Step-1, nlgeom=NO, perturbation
*Frequency, eigensolver=Lanczos, sim, acoustic coupling=on, normalization=mass
10, , , , ,
**
** OUTPUT REQUESTS
**
*Restart, write, frequency=0
**
** FIELD OUTPUT: F-Output-1
**
*Output, field
*Node Output
CF, RF, U
*Element Output, directions=YES
S,
**
** HISTORY OUTPUT: H-Output-1
**
*Output, history
*Energy Output
ALLKE, ALLSE
*End Step
